# Required import for python
import Sofa
import numpy as np


# Data
poissonRatio_ALL=0.48
youngModulus_H=3400
youngModulus_D=300
youngModulus_E=1000
scale3d_needle="1.6 1.6 1.6"
pointPosition_onNeedle="-2.32 0.007 0.02" #N: 5,5,5
scale3d_skin="50 30 5"
GeomagicPosition="0 20 15"
skinVolume_fileName="C:\sofa\src\Chiara\mesh\skinVolume2"
#skinSurface_fileName="C:\sofa\src\examples\skinSurface.stl"
needleVolume_fileName="C:\sofa\src\Chiara\mesh\suture_needle.obj"

# Choose in your script to activate or not the GUI
USE_GUI = True

def main():
    import SofaRuntime
    import Sofa.Gui
    SofaRuntime.importPlugin("SofaOpenglVisual")
    SofaRuntime.importPlugin("SofaImplicitOdeSolver")
    root = Sofa.Core.Node("root")
    addScene(root)
    Sofa.Simulation.init(root)

    if not USE_GUI:
        for iteration in range(10):
            Sofa.Simulation.animate(root, root.dt.value)
    else:
        Sofa.Gui.GUIManager.Init("myscene", "qglviewer")
        Sofa.Gui.GUIManager.addGUI(root, __file__)
        Sofa.Gui.GUIManager.SetDimension(1080, 1080)
        Sofa.Gui.GUIManager.MainLoop(root)
        Sofa.Gui.GUIManager.closeGUI()


def createScene(root):
    root.gravity=[0, -9.81, 0]
    root.dt=0.01

    root.addObject('RequiredPlugin', pluginName="Geomagic SofaBoundaryCondition SofaCarving SofaConstraint SofaDeformable SofaEngine SofaGeneralLoader SofaGeneralObjectInteraction SofaGeneralSimpleFem SofaHaptics SofaImplicitOdeSolver SofaLoader SofaMeshCollision SofaOpenglVisual SofaRigid SofaSimpleFem SofaSparseSolver SofaUserInteraction SofaTopologyMapping ")

    # Collision pipeline
    root.addObject('CollisionPipeline', depth="6", verbose="0", draw="0")

    # Forces
    root.addObject('BruteForceDetection', name="detection")
    root.addObject('DefaultContactManager', name="CollisionResponse", response="FrictionContact")
    root.addObject('LocalMinDistance', name="proximity", alarmDistance="0.5", contactDistance="0.05", angleCone="0.1")

    # Animation loop
    root.addObject('FreeMotionAnimationLoop')

    # Constraint solver
    #root.addObject('GenericConstraintSolver')
    root.addObject('LCPConstraintSolver', tolerance="0.001", maxIt="1000")

    # Geomagic device
    root.addObject('GeomagicDriver', name="GeomagicDevice", deviceName="Default Device", scale="1", drawDeviceFrame="1", drawDevice="1", positionBase=GeomagicPosition,  orientationBase="0.707 0 0 0.707")

    # Carving
    #root.addObject('CarvingManager', active="true", carvingDistance="0.1") #CARVING

    #########################################################
    #--------------------- SKIN LAYER ----------------------#
    #########################################################


    #################### BEHAVIOUR ##########################

    skin = root.addChild('skin')

    # Solvers
    skin.addObject('EulerImplicitSolver', name="odesolver")
    skin.addObject('CGLinearSolver', iterations="25", name="EpiLinearsolver", tolerance="1.0e-9", threshold="1.0e-9")

    # Volumetric mesh loader
    skin.addObject('MeshGmshLoader', name='volumeLoader', filename=skinVolume_fileName, scale3d=scale3d_skin)
    #skin.addObject('MeshTopology', src='@volumeLoader')

    # Tetrahedra container
    skin.addObject('TetrahedronSetTopologyContainer', src='@volumeLoader', name='TetraContainer')#,  template='Vec3d')
    skin.addObject('TetrahedronSetGeometryAlgorithms', template='Vec3d')
    skin.addObject('TetrahedronSetTopologyModifier')

    # Mechanical object
    skin.addObject('MechanicalObject', name='SkinMechObj', template='Vec3d')#, src="@volumeLoader", position="1 1 20")#, showIndices='true')

    # Mass
    skin.addObject('DiagonalMass', name="SkinMass", template="Vec3d,double", massDensity="1.0")

    # Constraints: check to have not overconstrained the skin!
    skin.addObject('BoxROI', name='boxROI', box='-50 -50 -2 50 50 4', drawBoxes='true')
    skin.addObject('RestShapeSpringsForceField', points='@boxROI.indices', stiffness='1e12', angularStiffness='1e12')

    skin.addObject('TetrahedronFEMForceField', template='Vec3d', name='FEM', method='large', youngModulus='300', poissonRatio='0.49')
    skin.addObject('UncoupledConstraintCorrection')


    #################### COLLISION ##########################

    skinCollis = skin.addChild('skinCollis')

    # Mapped from the tetra of behaviour model
    skinCollis.addObject('TriangleSetTopologyContainer', name="T_Container")
    skinCollis.addObject('TriangleSetTopologyModifier', name="T_Modifier")
    skinCollis.addObject('TriangleSetGeometryAlgorithms', template="Vec3d", name="T_GeomAlgo")
    skinCollis.addObject('Tetra2TriangleTopologicalMapping', name="default8", input="@../TetraContainer", output="@T_Container")

    # Types of collision
    skinCollis.addObject('TriangleCollisionModel', name="skinTri", tags="CarvingSurface")
    skinCollis.addObject('LineCollisionModel')
    skinCollis.addObject('PointCollisionModel')#, tags="CarvingSurface")


    #################### VISUALIZATION ########################

    skinVisu = skinCollis.addChild('skinVisu')
    skinVisu.addObject('OglModel', template="Vec3d", name="Visual", color="1 0.75 0.796", material="Default Diffuse 1 0 0 1 1 Ambient 1 0 0 0.2 1 Specular 0 0 0 1 1 Emissive 0 0 0 1 1 Shininess 0 45 ")
    skinVisu.addObject('IdentityMapping', template="Vec3d,Vec3d", name="default12", input="@..", output="@Visual" )


    #######################################################
    #--------------------- GEOMAGIC ----------------------#
    #######################################################

    Omni=root.addChild('Omni')
    Omni.addObject('MechanicalObject', template="Rigid3", name="DOFs", position="@GeomagicDevice.positionDevice")
    Omni.addObject('MechanicalStateController', template="Rigid3", listening="true", mainDirection="-1.0 0.0 0.0")


    #########################################################
    #--------------------- INSTRUMENT ----------------------#
    #########################################################
    '''
    needleNode = root.addChild('Needle')

    needleNode.addObject('EulerImplicitSolver', name='ODE solver', rayleighStiffness="0.01", rayleighMass="1.0")
    needleNode.addObject('CGLinearSolver', name='linear solver', iterations="25", tolerance="1e-7", threshold="1e-7")
    needleNode.addObject('MechanicalObject', name='mechObject', template='Vec3d', scale3d=scale3d_needle, position="@GeomagicDevice.positionDevice")
    #needleNode.addObject('RigidMapping', template="Rigid3d", name="GeoToNeedle",  input="@DOFs",  output="@mechObject")

    needleNode.addObject('UniformMass', name='mass', totalMass="1")
    #needleNode.addObject('RestShapeSpringsForceField', stiffness='1000', angularStiffness='1000', external_rest_shape='@../Omni/DOFs', points='0', external_points='0')
    needleNode.addObject('LCPForceFeedback', name="LCPFF1", activate="true", forceCoef="0.5")
    needleNode.addObject('UncoupledConstraintCorrection')

    # Visual node
    needleVisNode = needleNode.addChild('VisualModel')

    needleVisNode.addObject('MeshObjLoader', name='instrumentMeshLoader', filename=needleVolume_fileName)

    needleVisNode.addObject('OglModel', name='InstrumentVisualModel', src='@instrumentMeshLoader', ry="-180", rz="-90", dz="3.5", dx="-0.3",scale3d=scale3d_needle)
    needleVisNode.addObject('RigidMapping', name='MM-VM mapping', input='@mechObject', output='@InstrumentVisualModel')

    # Collision node
    needleColNode = needleNode.addChild('CollisionModel')

    needleColNode.addObject('MechanicalObject', template="Vec3d", name="Particle", position=pointPosition_onNeedle)
    needleColNode.addObject('PointCollisionModel', name="ParticleModel", contactStiffness="2")
    needleColNode.addObject('RigidMapping', template="Rigid3d", name="MM->CM mapping",  input="@mechObject",  output="@Particle")

    '''


    needleNode = root.addChild('Needle')

    needleNode.addObject('EulerImplicitSolver', name='ODE solver', rayleighStiffness="0.01", rayleighMass="1.0")
    needleNode.addObject('CGLinearSolver', name='linear solver', iterations="25", tolerance="1e-7", threshold="1e-7")
    needleNode.addObject('MeshObjLoader', name='instrumentMeshLoader', filename=needleVolume_fileName)
    needleNode.addObject('MechanicalObject', src="@instrumentMeshLoader", name='mechObject', template='Rigid3d', position="@GeomagicDevice.positionDevice", rotation="0 0 10", scale3d=scale3d_needle)
    needleNode.addObject('UniformMass', name='mass', totalMass="2")
    needleNode.addObject('RestShapeSpringsForceField', stiffness='1000', angularStiffness='1000', external_rest_shape='@../Omni/DOFs', points='0', external_points='0')
    needleNode.addObject('LCPForceFeedback', name="LCPFF1", activate="true", forceCoef="0.5")
    needleNode.addObject('UncoupledConstraintCorrection')

    # Visual node
    needleVisNode = needleNode.addChild('VisualModel')

    needleVisNode.addObject('OglModel', name='InstrumentVisualModel', src='@../instrumentMeshLoader', scale3d=scale3d_needle, rx="-10", ry="160", rz="180",  dz="-4", dx="0", dy="0", color="0 0.5 0.796")
    needleVisNode.addObject('RigidMapping', name='MM-VM mapping', input='@../mechObject', output='@InstrumentVisualModel')

    # Collision node
    needleColNode = needleNode.addChild('CollisionModel')

    needleColNode.addObject('MechanicalObject', template="Vec3d", name="Particle", position=pointPosition_onNeedle, rx="-10", ry="180", rz="160",  dz="-4", dx="0", dy="0")
    needleColNode.addObject('SphereCollisionModel', radius="0.09", name="ParticleModel", contactStiffness="2")#, tags="CarvingTool")
    needleColNode.addObject('RigidMapping', template="Rigid3d,Vec3d", name="MM->CM mapping",  input="@../mechObject",  output="@Particle")


    #contactListener=root.addChild('contactListener')
    #contactlistener.addObject('ContactListener',  collisionModel1="@/skin/skinCollis/skinTri",  collisionModel2="@/needle/needleColNode/ParticleModel" )


    return root


if __name__ == '__main__':
    main()
