# Required import for python
import Sofa
import numpy as np
import Sofa.SofaDeformable

# Data
#scale3d_skin="0.2 0.3 1" #thin
#scale3d_skin="1 0.6 1"
scale3d_skin="0.2 0.5 0.1"
scale3d_needle="5 5 5"
scale3d_thread="0.5 0.5 0.5"

pointPosition_onNeedle="-6.98 0.02 0.05" #N: 5,5,5

GeomagicPosition="0 20 15"
skinVolume_fileName="mesh\skin_volume_403020_05" #03 troppo lento
needleVolume_fileName="mesh\suture_needle.obj"
threadVolume_fileName="mesh/threadCh2"

# Data
skin_youngModulus=300#300
thread_youngModulus=2000
skin_poissonRatio=0.1#0.49
thread_poissonRatio=0.8


# Choose in your script to activate or not the GUI
USE_GUI = True


def main():
    import SofaRuntime
    import Sofa.Gui
    import Sofa.Core
    SofaRuntime.importPlugin("SofaComponentAll")
    SofaRuntime.importPlugin("SofaOpenglVisual")
    SofaRuntime.importPlugin("SofaImplicitOdeSolver")

    root = Sofa.Core.Node("root")
    createScene(root)

    Sofa.Simulation.init(root)

    if not USE_GUI:
        for iteration in range(10):
            Sofa.Simulation.animate(root, root.dt.value)
    else:
        Sofa.Gui.GUIManager.Init("myscene", "qglviewer")
        Sofa.Gui.GUIManager.addGUI(root, __file__)
        Sofa.Gui.GUIManager.SetDimension(1080, 1080)
        Sofa.Gui.GUIManager.MainLoop(root)
        Sofa.Gui.GUIManager.closeGUI()


def createScene(root):

    # Define root properties
    root.gravity=[0, 0, -10]
    root.dt=0.01

    # Required plugins
    root.addObject('RequiredPlugin', pluginName="SofaBaseMechanics SofaBaseTopology  Geomagic SofaBoundaryCondition  SofaConstraint SofaDeformable SofaEngine SofaGeneralLoader SofaGeneralObjectInteraction SofaGeneralSimpleFem SofaHaptics SofaImplicitOdeSolver SofaLoader SofaMeshCollision SofaOpenglVisual SofaRigid SofaSimpleFem SofaSparseSolver SofaUserInteraction SofaTopologyMapping ")

    # Collision pipeline
    root.addObject('CollisionPipeline', depth="6", verbose="0", draw="0")

    # Forces
    root.addObject('BruteForceDetection', name="detection")
    root.addObject('DefaultContactManager', name="CollisionResponse", response="FrictionContact")
    root.addObject('LocalMinDistance', name="proximity", alarmDistance="0.3", contactDistance="0.05", angleCone="0.0")

    # Animation loop
    root.addObject('FreeMotionAnimationLoop')

    # Constraint solver
    LCPConstraintSolver=root.addObject('LCPConstraintSolver', tolerance="0.001", maxIt="1000")

    # View
    root.addObject('OglViewport', screenPosition="0 0", cameraPosition="-0.00322233 -20.3537 18.828", cameraOrientation="0.418151 -6.26277e-06 -0.000108372 0.908378")

    # Add skin
    Skin(parentNode=root, name='SkinLeft', rotation=[0.0, 0.0, 0.0], translation=[0.0, 0.0, 0.0],
    scale3d=scale3d_skin, fixingBox=[-1, -1, -2, 13, 23, 1],
    importFile=skinVolume_fileName,  task="Suture")


    physicalSphere2(parentNode=root, name="sph")


    return root

def Skin(parentNode=None, name=None, rotation=[0.0, 0.0, 0.0], translation=[0.0, 0.0, 0.0],
scale3d=[0.0, 0.0, 0.0],  fixingBox=[0.0, 0.0, 0.0], indicesBox=[0.0, 0.0, 0.0],  importFile=None,
carving=False, side=0, task=None):

    name=parentNode.addChild(name)

    #################### BEHAVIOUR ##########################
    # Solvers
    name.addObject('EulerImplicitSolver', name="odesolver", rayleighStiffness="0.01", rayleighMass="0.01") #added  2 params
    name.addObject('CGLinearSolver', iterations="25", name="EpiLinearsolver", tolerance="1.0e-9", threshold="1.0e-9")

    #name.addObject('SparseLDLSolver')

    # Volumetric mesh loader
    name.addObject('MeshGmshLoader', name='volumeLoader', filename=importFile, scale3d=scale3d)

    # Tetrahedra container
    name.addObject('TetrahedronSetTopologyContainer', src='@volumeLoader', name='TetraContainer')
    name.addObject('TetrahedronSetGeometryAlgorithms', template='Vec3d')
    name.addObject('TetrahedronSetTopologyModifier') # Leave it there for the carving plugin!

    # Mechanical object and mass
    name.addObject('MechanicalObject', name='SkinMechObj', src='@volumeLoader', template='Vec3d', translation=translation) #added src for trial
    #name.addObject('UniformMass', name='mass', totalMass="1")
    name.addObject('DiagonalMass', name="SkinMass", massDensity="2", template="Vec3d,double") #density: higher: pudding.

    # Forces
    name.addObject('TetrahedralCorotationalFEMForceField', template='Vec3d', name='FEM', method='large', youngModulus=700, poissonRatio=skin_poissonRatio)
    name.addObject('UncoupledConstraintCorrection', compliance=0.001)
    #name.addObject('LinearSolverConstraintCorrection')
    #name.addObject('GenericConstraintCorrection')
    #name.addObject('RecomputedConstraintCorrection')

    # Fixed box for constraints
    boxROI=name.addObject('BoxROI', name='boxROI', box=fixingBox, drawBoxes='true', computeTriangles='true')
    name.addObject('RestShapeSpringsForceField', name='rest', points='@boxROI.indices', stiffness='1e12', angularStiffness='1e12')

    name.addObject("Monitor", name="Skin_force_ball", indices="120", listening="1", TrajectoriesPrecision="0.1", ExportForces="true")


    #################### COLLISION ##########################

    SkinColl = name.addChild('SkinCollMID')

    # Mapped from the tetra of behaviour model
    SkinColl.addObject('TriangleSetTopologyContainer', name="T_Container")
    SkinColl.addObject('TriangleSetTopologyModifier', name="T_Modifier")
    SkinColl.addObject('TriangleSetGeometryAlgorithms', template="Vec3d", name="T_GeomAlgo")
    SkinColl.addObject('Tetra2TriangleTopologicalMapping', name="default8", input="@../TetraContainer", output="@T_Container")

    SkinColl.addObject('TriangleCollisionModel', name="TriangleCollisionSkin")

    SkinColl.addObject('LineCollisionModel', name="LineCollisionSkin")
    SkinColl.addObject('PointCollisionModel', name="PointCollisionSkin")
    #SkinColl.addObject('IdentityMapping')

    #################### VISUALIZATION ########################

    SkinVisu = SkinColl.addChild('SkinVisu')
    SkinVisu.addObject('MechanicalObject', name="VisuMO")
    SkinVisu.addObject('OglModel', template="Vec3d", name="Visual", color="1 0.75 0.796",
    material="Default Diffuse 1 0 0 1 1 Ambient 1 0 0 0.2 1 Specular 0 0 0 1 1 Emissive 0 0 0 1 1 Shininess 0 45 ")
    #SkinVisu.addObject('BarycentricMapping', template="Vec3d,Vec3d", name="default12", input="@..", output="@Visual" ) # For grids
    SkinVisu.addObject('IdentityMapping', template="Vec3d,Vec3d", name="default12", input="@..", output="@Visual" )


# Training sphere
def physicalSphere(parentNode=None, name=None, translation=[0.0, 0.0, 0.0], scale3d=[0.0, 0.0, 0.0], color=[0.0, 0.0, 0.0]):

    name=parentNode.addChild(name)

    #################### BEHAVIOUR ##########################

    name.addObject('EulerImplicitSolver', name='ODE solver', rayleighStiffness="0.01", rayleighMass="1.0")
    name.addObject('CGLinearSolver', name='linear solver', iterations="25", tolerance=0.01, threshold=0.0001)#, tolerance="1e-7", threshold="1e-7")
    name.addObject('MeshObjLoader', name='instrumentMeshLoader', filename="mesh\sphere.obj")

    name.addObject('MechanicalObject',  name='InstrumentMechObject', template='Rigid3d',src="@instrumentMeshLoader", translation=[5, 10, 5], velocity="0 0 -1")#, scale3d=[2, 2, 2])

    name.addObject('UniformMass', name='mass', totalMass="50")
    name.addObject('UncoupledConstraintCorrection')
    #Force = name.addObject('ConstantForceField', name="CFF", totalForce=[0, 0, 1, 0, 0, 0] )

    #################### COLLISION ##########################

    InstrumentColl_Front = name.addChild('InstrumentColl_Front')
    InstrumentColl_Front.addObject('MechanicalObject', template="Vec3d", name="Particle")#, position="5 5 5")
    InstrumentColl_Front.addObject('SphereCollisionModel', radius="2", name="SphereCollisionInstrument", contactStiffness="1")
    InstrumentColl_Front.addObject('RigidMapping', template="Rigid3d,Vec3d", name="MM->CM mapping",  input="@../InstrumentMechObject",  output="@Particle")


    #################### VISUALIZATION ########################

    InstrumentVisu = name.addChild('InstrumentVisu')
    InstrumentVisu.addObject('OglModel', name='InstrumentVisualModel', src='@../instrumentMeshLoader')#, scale3d=[2,2,2])
    InstrumentVisu.addObject('RigidMapping', template="Rigid3d,Vec3d", name='MM-VM mapping', input='@../InstrumentMechObject', output='@InstrumentVisualModel')


def physicalSphere2(parentNode=None, name=None, translation=[0.0, 0.0, 0.0], scale3d=[0.0, 0.0, 0.0], color=[0.0, 0.0, 0.0]):

    name=parentNode.addChild(name)
    name.addObject('EulerImplicitSolver',  rayleighStiffness="0.1", rayleighMass="0.1" )
    name.addObject('CGLinearSolver', iterations="25", tolerance="1e-5" ,threshold="1e-5")
    name.addObject('MechanicalObject', template="Rigid3d", scale="1.0" ,translation=[0.5, 14, 5], velocity="0 0 -1000")
    name.addObject('UniformMass' , totalMass=20)
    name.addObject('UncoupledConstraintCorrection')

    Visu=name.addChild('Visu')
    Visu.addObject('MeshObjLoader' ,name="meshLoader_3", filename="mesh\sphere.obj", scale="1.0", handleSeams="1" )
    Visu.addObject('OglModel' ,name="VisualOGL" ,src="@meshLoader_3", color="0.0 0.5 0.5 1.0")
    Visu.addObject('RigidMapping' ,input="@..", output="@VisualOGL")
    Surf=name.addChild('Surf')
    Surf.addObject('MeshObjLoader' ,filename="mesh\sphere.obj" ,name="loader" )
    Surf.addObject('MeshTopology' ,src="@loader")
    Surf.addObject('MechanicalObject' ,src="@loader", scale="1.0")
    Surf.addObject('TriangleCollisionModel', name="Torus2Triangle" ,group="2")
    Surf.addObject('LineCollisionModel', name="Torus2Line" ,group="2")
    Surf.addObject('PointCollisionModel' ,name="Torus2Point" ,group="2")
    Surf.addObject('RigidMapping')

if __name__ == '__main__':
    main()
