# Required import for python
import Sofa
import numpy as np
import Sofa.SofaDeformable
import suture_models
#from goto import goto, label
import subprocess
import read_Files
import time

# Data

scale3d_skin="0.25 0.55 0.1"
scale3d_needle="5 5 5"
scale3d_thread="0.5 0.5 0.3"

pointPosition_onNeedle="-6.98 0.02 0.05" #N: 5,5,5

GeomagicPosition="0 20 15"
skinVolume_fileName="mesh/skin_volume_403020_05" #03 troppo lento
needleVolume_fileName="mesh/suture_needle.obj"
threadVolume_fileName="mesh/threadCh2"

stiffness_springNeedle=100 #100 #300 slows sim
stiffness_springSkins=200


# Choose in your script to activate or not the GUI
USE_GUI = True


def main():
    import SofaRuntime
    import Sofa.Gui
    import Sofa.Core
    SofaRuntime.importPlugin("SofaComponentAll")
    SofaRuntime.importPlugin("SofaOpenglVisual")
    SofaRuntime.importPlugin("SofaImplicitOdeSolver")

    root = Sofa.Core.Node("root")
    createScene(root)

    Sofa.Simulation.init(root)

    if not USE_GUI:
        for iteration in range(10):
            Sofa.Simulation.animate(root, root.dt.value)
    else:
        Sofa.Gui.GUIManager.Init("myscene", "qglviewer")
        Sofa.Gui.GUIManager.addGUI(root, __file__)
        Sofa.Gui.GUIManager.SetDimension(1080, 1080)
        Sofa.Gui.GUIManager.MainLoop(root)
        Sofa.Gui.GUIManager.closeGUI()


## This function creates the graph node

def createScene(root):

    [RepNumber,user_name]=read_Files.read()


    fileNamePos=f"Rep{RepNumber}_{user_name}_SuturePos"
    fileNameVel=f"Rep{RepNumber}_{user_name}_SutureVel"
    fileNameForce=f"Rep{RepNumber}_{user_name}_SutureForce"

    # Define root properties
    root.gravity=[0, 0, -2]
    root.dt=0.01

    # Required plugins
    root.addObject('RequiredPlugin', pluginName="SofaBaseMechanics SofaBaseTopology  Geomagic SofaCarving SofaBoundaryCondition  SofaConstraint SofaDeformable SofaEngine SofaGeneralLoader SofaGeneralObjectInteraction SofaGeneralSimpleFem SofaHaptics SofaImplicitOdeSolver SofaLoader SofaMeshCollision SofaOpenglVisual SofaRigid SofaSimpleFem SofaSparseSolver SofaUserInteraction SofaTopologyMapping SofaValidation")

    # root.addObject('OglLabel', label="SUTURE TASK - TRAINING", x=20, y=20, fontsize=30, selectContrastingColor="1")
    # root.addObject('OglLabel', label="Pierce the skin in correnspondence of the green spheres", x=20, y=70, fontsize=20, selectContrastingColor="1")
    # root.addObject('OglLabel', label="starting from the one closest to the needle", x=20, y=100, fontsize=20, selectContrastingColor="1")
    root.addObject('ViewerSetting', fullscreen="true")
    root.addObject('BackgroundSetting', color="0.3 0.5 0.8")

    # Collision pipeline
    root.addObject('CollisionPipeline', depth="6", verbose="0", draw="0")

    # Forces
    root.addObject('BruteForceDetection', name="detection")
    root.addObject('DefaultContactManager', name="CollisionResponse", response="FrictionContact")
    root.addObject('LocalMinDistance', name="proximity", alarmDistance="0.3", contactDistance="0.05", angleCone="0.0")

    # Animation loop
    root.addObject('FreeMotionAnimationLoop')

    # Constraint solver
    root.addObject('LCPConstraintSolver', tolerance="0.001", maxIt="1000")

    # View
    #root.addObject('OglViewport', screenPosition="0 0", cameraPosition="-0.00322233 -20.3537 18.828", cameraOrientation="0.418151 -6.26277e-06 -0.000108372 0.908378")

    # Add skin
    x=[8,8,13.5,13.5]
    y=[4,10,4.5,10.5]
    z=2
    boxSize=2

    skin_left=suture_models.Skin(parentNode=root, name='SkinLeft', rotation=[0.0, 0.0, 0.0], translation=[0.0, 0.0, 0.0],
    scale3d=scale3d_skin, fixingBox=[-0.1, -0.1, -2, 10, 16.5, 0.1],
    sphere1Box=[x[0]-boxSize, y[0]-boxSize, -0.1, x[0]+boxSize, y[0]+boxSize, 3], sphere2Box=[x[1]-boxSize, y[1]-boxSize, -0.1, x[1]+boxSize, y[1]+boxSize, 3])

    skin_right=suture_models.Skin(parentNode=root, name='SkinRight', rotation=[0.0, 0.0, 0.0], translation=[11.5, 0, 0],
    scale3d=scale3d_skin, fixingBox=[10.5, -0.1, -2, 21, 16.5, 0.1],
    sphere3Box=[x[2]-boxSize, y[2]-boxSize, -0.1, x[2]+boxSize, y[2]+boxSize, 3], sphere4Box=[x[3]-boxSize, y[3]-boxSize, -0.1, x[3]+boxSize, y[3]+boxSize, 3], side=1)

    #################### GEOMAGIC TOUCH DEVICE ##################################################################
    root.addObject('GeomagicDriver', name="GeomagicDeviceRight", deviceName="Right Device", scale="1", drawDeviceFrame="0",
    drawDevice="0", positionBase="10 6 10",  orientationBase="0.707 0 0 0.707", tags="Omni", forceFeedBack="@SutureNeedle/LCPFFNeedle")

    GeomagicDevice(parentNode=root, name='Omni', position="@GeomagicDeviceRight.positionDevice")

    # Add needle
    suture_models.SutureNeedle(parentNode=root, name='SutureNeedle', monitor=True, file1=fileNamePos, file2=fileNameVel, file3=fileNameForce, position="@GeomagicDeviceRight.positionDevice",rx=70, ry=0, rz=50) # To fall on sphere: dx=12, dy=3, dz=6

    #############################################################################################################

    # # Add Suture Controller
    root.addObject(SutureTaskTrainingController(name="MyController", rootNode=root, skin_left=skin_left, skin_right=skin_right))#, RepNumber=f"{RepNumber}_SutTimeConfig.txt") )

    # Add training spheres: add when necessary
    suture_models.sphere(parentNode=root, name="Sphere1", translation=[x[0], y[0], z], scale3d="1.5 1.5 1.5", color="1.0 0 0.0", SphereModelNumber="M1")
    suture_models.sphere(parentNode=root, name="Sphere2", translation=[x[1], y[1], z], scale3d="1.5 1.5 1.5", color="1.0 0 0.0", SphereModelNumber="M2")
    suture_models.sphere(parentNode=root, name="Sphere3", translation=[x[2], y[2], z], scale3d="1.5 1.5 1.5", color="1.0 0 0.0", SphereModelNumber="M3")
    suture_models.sphere(parentNode=root, name="Sphere4", translation=[x[3], y[3], z], scale3d="1.5 1.5 1.5", color="1.0 0 0.0", SphereModelNumber="M4")
    #print(f"{RepNumber}_SutTimeConfig.txt")

    return root


## This function defines a geomagic
# @param parentNode: parent node of the skin patch
# @param name: name of the behavior node
# @param rotation: rotation
# @param translation: translation
def GeomagicDevice(parentNode=None, name=None, position=None):
    name=parentNode.addChild(name)
    name.addObject('MechanicalObject', template="Rigid3", name="DOFs", position=position)
    name.addObject('MechanicalStateController', template="Rigid3", listening="true", mainDirection="-1.0 0.0 0.0", handleEventTriggersUpdate="true")


# Controller for suture task training
# Handles the suture procedure

class SutureTaskTrainingController(Sofa.Core.Controller):

    ## Constructor of the class.
    # @param name: name of the controller
    # @param rootnode: path to the root node of the simulation
    # @param skin_left: path to the left skin patch root node
    # @param skin_right: path to the right skin patch root node
    # Defines the contact listeners between spheres and the needle and creates the 4 force fields

    def __init__(self, name, rootNode, skin_left, skin_right):
        Sofa.Core.Controller.__init__(self, name, rootNode, skin_left, skin_right)

        # Define contact listeners (SkinLeft-Needle; SkinRight-Needle)
        self.contact_listener = rootNode.addObject('ContactListener', name="LeftContact", collisionModel1 = suture_models.Skin.COLL, collisionModel2 = suture_models.SutureNeedle.COLL_FRONT)
        self.contact_listener_right = rootNode.addObject('ContactListener', name="RightContact", collisionModel1 = suture_models.Skin.COLL_right, collisionModel2 = suture_models.SutureNeedle.COLL_FRONT)
        # Define contact listeners (SkinLeft-Needle; SkinRight-Needle)
        self.contact_listener_back = rootNode.addObject('ContactListener', name="LeftContact_back", collisionModel1 = suture_models.Skin.COLL, collisionModel2 = suture_models.SutureNeedle.COLL_BACK)
        self.contact_listener_right_back = rootNode.addObject('ContactListener', name="RightContact_back", collisionModel1 = suture_models.Skin.COLL_right, collisionModel2 = suture_models.SutureNeedle.COLL_BACK)

        # Define spring force fields (SkinLeft-Needle; SkinRight-Needle; SkinLeft-SkinRight; SkinRight-SkinLeft)
        self.spring_force_field = skin_left.addObject("StiffSpringForceField", name="LeftFF", object1 = suture_models.Skin.MO,  object2=suture_models.SutureNeedle.COLL_BACK_MO)
        self.spring_force_field_right = skin_right.addObject("StiffSpringForceField", name="RightFF", object1 = suture_models.Skin.MO_right,  object2=suture_models.SutureNeedle.COLL_BACK_MO)
        self.spring_force_field_skins = skin_left.addObject("StiffSpringForceField", name="SkinsFF", object1 = suture_models.Skin.MO,  object2=suture_models.Skin.MO_right)
        self.spring_force_field_skins_right = skin_right.addObject("StiffSpringForceField", name="SkinsRightFF", object1 = suture_models.Skin.MO_right,  object2=suture_models.Skin.MO)

        # Pass last created springs (LeftSkin-Needle)
        self.springsCreated_left=False
        # Pass last created springs (RightSkin-Needle)
        self.springsCreated_right=False

        self.boxAttached=None
        self.finished=True
        self.root=rootNode
        self.points=0
        # self.nameFile=RepNumber
        # print(RepNumber)
        # print(self.nameFile)
        self.first=1


    # 4: SOPRA, 2: SOTTO, 3 (SOPRA), 1 (SOTTO)
    # 4, 3 right
    # 2, 1 left
    ## Method called at each begin of animation step
    # @param event: animation step event
    # If a contact between the needle tip and one of the skin patches, the function retrieves the skin triangle index of contact and
    # checks if it belongs to one of the sphere boxes. If it does and no springs already exist between the needle and that skin patch,
    # it checks if springs exist between the needle and the other skin patch. If they do, the patches get connected by springs,
    # the former springs needle-skin are removed. Then the new needle-skin springs are created.
    # Finally, the color of the sphere is changed from red to green adn the user points are increased.
    # At the end of the function, the last needle-skin springs are removed on button press.

    def onAnimateBeginEvent(self, event):

        if self.first==1:
            Data = open('Sut.txt', 'a')
            var1=f"\n\n"
            Data.write(var1)
            Data.close()
            self.first=0

        Data = open('Sut.txt', 'a')
        var1=f"{time.time()}\n"
        Data.write(var1)
        Data.close()

        ##print(suture_models.SutureNeedle.COLL_MO.findData('position').value)

        newMaterial="Default Diffuse 1 0 0.5 0 1 Ambient 1 0 0.1 0 1 Specular 0 0 0.5 0 1 Emissive 0 0 0.5 0 1 Shininess 0 45"
        coll_indexes=self.contact_listener.getContactElements()
        coll_indexes_right=self.contact_listener_right.getContactElements()

        ##print(self.contact_listener_right_back.getContactElements() )

        # In case of collision (SkinLeft-Needle):
        if coll_indexes!=[] and self.finished==True:

            #print("Contact on the left")
            self.finished=False

            coll_indexes2=coll_indexes[0]
            coll_index_skin=coll_indexes2[1]
            ##print(self.root.GeomagicDeviceRight.findData('positionDevice').value[2])

            # Does it belong to box 1? If it does:
            if (coll_index_skin in suture_models.Skin.sphere1Box.findData('triangleIndices').value):# and (self.root.GeomagicDeviceRight.findData('positionDevice').value[2]<=2.5):
                #print("Box 1")


                # Change sphere color
                suture_models.sphere.M1.findData('material').value=newMaterial

                if self.springsCreated_left==False:

                    # Do springs on the other side exist? If they do:
                    if self.springsCreated_right==True:

                        # Attach the two boxes: the old one and the new one
                        self.contactLeft_attachBoxes(self.boxAttached.findData('indices').value, suture_models.Skin.sphere1Box.findData('indices').value) # Left then right

                        # Then remove the previous springs.
                        self.contactLeft_disattach()

                    # Set this box as the last one attached
                    self.boxAttached=suture_models.Skin.sphere1Box

                    # Create springs SkinLeft-Back_Needle
                    self.contactLeft_attach(self.boxAttached)


                    # Increase the points!
                    self.points+=1

                self.finished=True
                self.contactRight_disattach()   # ADDED TO BREAK SPRINGS WITHOUT BUTTON!


            # Does it belong to box 2? If it does:
            elif (coll_index_skin in suture_models.Skin.sphere2Box.findData('triangleIndices').value) and (self.root.GeomagicDeviceRight.findData('positionDevice').value[2]<=3.5):
                #print("Box 2")


                # Change sphere color
                suture_models.sphere.M2.findData('material').value=newMaterial

                if self.springsCreated_left==False:

                    # Do springs on the other side exist? If they do:
                    if self.springsCreated_right==True:

                        # Attach the two boxes: the old one and the new one
                        self.contactLeft_attachBoxes(self.boxAttached.findData('indices').value,suture_models.Skin.sphere2Box.findData('indices').value) # Left then right

                        # Then remove the previous springs.
                        self.contactLeft_disattach()

                    # Set this box as the last one attached
                    self.boxAttached=suture_models.Skin.sphere2Box

                    # Create springs SkinLeft-Back_Needle
                    self.contactLeft_attach(self.boxAttached)

                    # Increase the points!
                    self.points+=1

                self.finished=True

            else:
                #print("No ball detected")
                self.finished=True


        # In case of collision (SkinRight-Needle):
        if coll_indexes_right!=[] and self.finished==True:
            #print("Contact on the right")
            self.finished=False

            coll_indexes2=coll_indexes_right[0]
            coll_index_skin=coll_indexes2[1]
            #print(self.root.GeomagicDeviceRight.findData('positionDevice').value[2])

            # Does it belong to a box? If it does:
            if (coll_index_skin in suture_models.Skin.sphere3Box.findData('triangleIndices').value) and (self.root.GeomagicDeviceRight.findData('positionDevice').value[2]>=2):
                #print("Box 3")

                # Change sphere color
                suture_models.sphere.M3.findData('material').value=newMaterial

                if self.springsCreated_right==False:

                    # Do springs on the other side exist? If they do:
                    if self.springsCreated_left==True:
                        # Attach the two boxes: the old one and the new one
                        self.contactRight_attachBoxes(self.boxAttached.findData('indices').value, suture_models.Skin.sphere3Box.findData('indices').value) # Check

                        # Then remove the previous springs.
                        self.contactRight_disattach()

                    # Set this box as the last one attached
                    self.boxAttached=suture_models.Skin.sphere3Box

                    # Create springs SkinLeft-Back_Needle
                    self.contactRight_attach(self.boxAttached)

                    # Increase the points!
                    self.points+=1

                self.finished=True

            # Does it belong to a box? If it does:
            elif (coll_index_skin in suture_models.Skin.sphere4Box.findData('triangleIndices').value) and (self.root.GeomagicDeviceRight.findData('positionDevice').value[2]>=2):
                #print("Box 4")

                # Change sphere color
                suture_models.sphere.M4.findData('material').value=newMaterial

                if self.springsCreated_right==False:

                    # Do springs on the other side exist? If they do:
                    if self.springsCreated_left==True:
                        # Attach the two boxes: the old one and the new one
                        self.contactRight_attachBoxes(self.boxAttached.findData('indices').value, suture_models.Skin.sphere4Box.findData('indices').value) # Check

                        # Then remove the previous springs.
                        self.contactRight_disattach()

                    # Set this box as the last one attached
                    self.boxAttached=suture_models.Skin.sphere4Box

                    # Create springs SkinLeft-Back_Needle
                    self.contactRight_attach(self.boxAttached)

                    # Increase the points!
                    self.points+=1

                self.finished=True

            else:
                #print("No ball detected")
                self.finished=True


        if self.root.GeomagicDeviceRight.findData('button2').value==1:
            if self.springsCreated_left==True:
                self.contactRight_disattach()
            if self.springsCreated_right==True:
                self.contactLeft_disattach()

        #print("--- %s seconds ---" % (time.time() - start_time))

        # if self.root.GeomagicDeviceRight.findData('button1').value==1:
        #     self.root.animate = False
        #     Config=open('Config.txt')
        #     for line in Config:
        #         pass
        #     user_name = line
        #     Config.close()

        #     fileName=f"{user_name}.txt"
        #     User = open(fileName, 'a')
        #     var = f"{self.points}"
        #     User.write(var)
        #     User.close()

        #     subprocess.call(['D:\Thesis\GUI\plotSuture.bat'])
        #     self.root.quit()


        #label .ending
        ##print("no collision")

    def PiercingStateFnct(self, contact_listener):
        #print("Wait for needle to pierce")
        #time.sleep(0.5)
        for i in range(1000):
            #print(contact_listener.getContactElements() )
            if contact_listener.getContactElements()!=[]:
                return 1
        #print("No contact")
        return 0


    ## Method that creates springs between the right skin patch and the left one.
    # @param indicesBox1: indices of the right box
    # @param indicesBox2: indices of the left box

    def contactRight_attachBoxes(self, indicesBox1, indicesBox2):
        #print("Attach two boxes")

        # Create springs
        springs = [Sofa.SofaDeformable.LinearSpring(index1=i, index2=j, springStiffness=stiffness_springSkins, dampingFactor=2, restLength=1) for i, j in zip(indicesBox1,indicesBox2)]
        self.spring_force_field_skins.addSprings(springs)
        #print("Springs added between skins")

    ## Method that creates springs between the left skin patch and the right one.
    # @param indicesBox1: indices of the left box
    # @param indicesBox2: indices of the right box

    def contactLeft_attachBoxes(self, indicesBox1, indicesBox2):
        #print("Attach two boxes")

        # Create springs
        springs = [Sofa.SofaDeformable.LinearSpring(index1=i, index2=j, springStiffness=stiffness_springSkins, dampingFactor=2, restLength=1) for i, j in zip(indicesBox1,indicesBox2)]
        self.spring_force_field_skins_right.addSprings(springs)
        #print("Springs added between skins")

    ## Method that creates springs between the left skin patch and the needle.
    # @param box: indices of the box

    def contactLeft_attach(self, box):
        #print("Contact on the left box detected!")
        indicesBox = box.findData('indices').value

        # Create springs
        #print("Create springs")
        springs = [Sofa.SofaDeformable.LinearSpring(index1=i, index2=0, springStiffness=stiffness_springNeedle, dampingFactor=1, restLength=1) for i in indicesBox]
        self.spring_force_field.addSprings(springs)
        self.springsCreated_left=True
        #print("Springs created between needle and left skin")

    ## Method that removes springs between the right skin patch and the needle

    def contactLeft_disattach(self):
        #print("Eliminating springs from right side of skin")

        N_Indices=len(self.boxAttached.findData('indices').value)
        self.spring_force_field_right.clear()

        #print("Springs removed")
        self.springsCreated_right=False

    ## Method that creates springs between the right skin patch and the needle.
    # @param box: indices of the box

    def contactRight_attach(self, box):
        #print("Contact on the right box detected!")
        indicesBox=box.findData('indices').value

        # Create springs
        #print("Create springs")
        springs = [Sofa.SofaDeformable.LinearSpring(index1=i, index2=0, springStiffness=stiffness_springNeedle, dampingFactor=1, restLength=1) for i in indicesBox]
        self.spring_force_field_right.addSprings(springs)
        self.springsCreated_right=True
        #print("Springs created between needle and right skin")

    ## Method that removes springs between the left skin patch and the needle
    def contactRight_disattach(self):
        #print("Eliminating springs from left side of skin")

        N_Indices=len(self.boxAttached.findData('indices').value)
        self.spring_force_field.clear()

        #print("Springs removed")
        self.springsCreated_left=False


if __name__ == '__main__':
    main()
